<?xml version="1.0"?>
<?xml-stylesheet type="text/xsl" href="http://jsbsim.sourceforge.net/JSBSim.xsl"?>
<fdm_config name="F-111" version="2.0" release="ALPHA"
   xmlns:xsi="http://www.w3.org/2001/XMLSchema-instance"
   xsi:noNamespaceSchemaLocation="http://jsbsim.sourceforge.net/JSBSim.xsd">

 <fileheader>
  <author> Aeromatic v 0.96 </author>
  <filecreationdate>2025-11-30</filecreationdate>
  <version>$Revision: 1.20 $</version>
  <description> Models a F-111. </description>
 </fileheader>

<!--
  File:     F-111.xml
  Inputs:
    name:          F-111
    type:          two-engine transonic/supersonic fighter
    max weight:    100000.0 lb
    wing span:     63 ft
    length:        73.6 ft
    wing area:     657.4 sq-ft
    gear type:     tricycle
    castering:
    retractable?:  yes
    # engines:     2
    engine type:   turboprop
    engine layout: aft fuselage
    yaw damper?    yes
  Outputs:
    wing loading:  152.11 lb/sq-ft
    payload:       32100.0 lbs
    CL-alpha:      3.6 per radian
    CL-0:          0.08
    CL-max:        1
    CD-0:          0.024
    K:             0.12

-->

 <metrics>
   <wingarea  unit="FT2">  657.40 </wingarea>
   <wingspan  unit="FT" >   63.00 </wingspan>
   <wing_incidence>          0 </wing_incidence>
   <chord     unit="FT" >   10.43 </chord>
   <htailarea unit="FT2">  131.48 </htailarea>
   <htailarm  unit="FT" >   29.44 </htailarm>
   <vtailarea unit="FT2">  118.33 </vtailarea>
   <vtailarm  unit="FT" >   29.44 </vtailarm>
   <location name="AERORP" unit="IN">
     <x> 529.92 </x>
     <y>   0.00 </y>
     <z>   0.00 </z>
   </location>
   <location name="EYEPOINT" unit="IN">
     <x> 176.64 </x>
     <y>   0.00 </y>
     <z>  38.00 </z>
   </location>
   <location name="VRP" unit="IN">
     <x>0</x>
     <y>0</y>
     <z>0</z>
   </location>
 </metrics>

 <mass_balance>
   <ixx unit="SLUG*FT2">    122322 </ixx>
   <iyy unit="SLUG*FT2">    229477 </iyy>
   <izz unit="SLUG*FT2">    287366 </izz>
   <emptywt unit="LBS" >     47200 </emptywt>
   <location name="CG" unit="IN">
     <x> 529.92 </x>
     <y>   0.00 </y>
     <z> -22.08 </z>
   </location>
   <pointmass name="Payload">
    <description> 32100 LBS + full (20700 LBS) fuel should bring model up to entered max weight</description>
    <weight unit="LBS">  0.0 </weight>
    <location name="POINTMASS" unit="IN">
      <x> 529.92 </x>
      <y>   0.00 </y>
      <z> -22.08 </z>
    </location>
  </pointmass>
 </mass_balance>

 <ground_reactions>

  <contact type="BOGEY" name="NOSE">
   <location unit="IN">
     <x> 114.82 </x>
     <y>   0.00 </y>
     <z> -120.98 </z>
   </location>
   <static_friction>  0.80 </static_friction>
   <dynamic_friction> 0.50 </dynamic_friction>
   <rolling_friction> 0.02 </rolling_friction>
   <spring_coeff unit="LBS/FT">      30000.00 </spring_coeff>
   <damping_coeff unit="LBS/FT/SEC"> 15000.00 </damping_coeff>
   <max_steer unit="DEG"> 45.00 </max_steer>
   <brake_group>NONE</brake_group>
   <retractable>1</retractable>
  </contact>

  <contact type="BOGEY" name="LEFT_MAIN">
   <location unit="IN">
     <x> 551.12 </x>
     <y> -68.04 </y>
     <z> -120.98 </z>
   </location>
   <static_friction>  0.80 </static_friction>
   <dynamic_friction> 0.50 </dynamic_friction>
   <rolling_friction> 0.02 </rolling_friction>
   <spring_coeff unit="LBS/FT">      100000.00 </spring_coeff>
   <damping_coeff unit="LBS/FT/SEC"> 50000.00 </damping_coeff>
   <max_steer unit="DEG">0</max_steer>
   <brake_group>LEFT</brake_group>
   <retractable>1</retractable>
  </contact>

  <contact type="BOGEY" name="RIGHT_MAIN">
   <location unit="IN">
     <x> 551.12 </x>
     <y>  68.04 </y>
     <z> -120.98 </z>
   </location>
   <static_friction>  0.80 </static_friction>
   <dynamic_friction> 0.50 </dynamic_friction>
   <rolling_friction> 0.02 </rolling_friction>
   <spring_coeff unit="LBS/FT">      100000.00 </spring_coeff>
   <damping_coeff unit="LBS/FT/SEC"> 50000.00 </damping_coeff>
   <max_steer unit="DEG">0</max_steer>
   <brake_group>RIGHT</brake_group>
   <retractable>1</retractable>
  </contact>

  <contact type="STRUCTURE" name="LEFT_WING">
    <location unit="IN">
     <x> 529.92 </x>
     <y> -31.50 </y>
     <z> -22.08 </z>
    </location>
    <static_friction>  1.00 </static_friction>
    <dynamic_friction> 1.00 </dynamic_friction>
    <spring_coeff unit="LBS/FT">      100000.00 </spring_coeff>
    <damping_coeff unit="LBS/FT/SEC"> 100000.00 </damping_coeff>
  </contact>

  <contact type="STRUCTURE" name="RIGHT_WING">
    <location unit="IN">
     <x> 529.92 </x>
     <y>  31.50 </y>
     <z> -22.08 </z>
    </location>
    <static_friction>  1.00 </static_friction>
    <dynamic_friction> 1.00 </dynamic_friction>
    <spring_coeff unit="LBS/FT">      100000.00 </spring_coeff>
    <damping_coeff unit="LBS/FT/SEC"> 100000.00 </damping_coeff>
  </contact>

 </ground_reactions>

 <propulsion>

   <engine file="TF30-P100">
    <location unit="IN">
      <x> 823.20 </x>
      <y> -20.00 </y>
      <z>   0.00 </z>
    </location>
    <orient unit="DEG">
      <pitch> 0.00 </pitch>
      <roll>  0.00 </roll>
      <yaw>   0.00 </yaw>
    </orient>
    <feed>0</feed>
    <thruster file="direct">
     <location unit="IN">
       <x> 823.20 </x>
       <y> -20.00 </y>
       <z>   0.00 </z>
     </location>
     <orient unit="DEG">
       <pitch> 0.00 </pitch>
       <roll>  0.00 </roll>
       <yaw>   0.00 </yaw>
     </orient>
    </thruster>
  </engine>

   <engine file="TF30-P100">
    <location unit="IN">
      <x> 823.20 </x>
      <y>  20.00 </y>
      <z>   0.00 </z>
    </location>
    <orient unit="DEG">
      <pitch> 0.00 </pitch>
      <roll>  0.00 </roll>
      <yaw>   0.00 </yaw>
    </orient>
    <feed>1</feed>
    <thruster file="direct">
     <location unit="IN">
       <x> 823.20 </x>
       <y>  20.00 </y>
       <z>   0.00 </z>
     </location>
     <orient unit="DEG">
       <pitch> 0.00 </pitch>
       <roll>  0.00 </roll>
       <yaw>   0.00 </yaw>
     </orient>
    </thruster>
  </engine>

  <tank type="FUEL" number="0">
     <location unit="IN">
       <x> 529.92 </x>
       <y>   0.00 </y>
       <z> -22.08 </z>
     </location>
     <capacity unit="LBS"> 6900.00 </capacity>
     <contents unit="LBS"> 3450.00 </contents>
  </tank>

  <tank type="FUEL" number="1">
     <location unit="IN">
       <x> 529.92 </x>
       <y>   0.00 </y>
       <z> -22.08 </z>
     </location>
     <capacity unit="LBS"> 6900.00 </capacity>
     <contents unit="LBS"> 3450.00 </contents>
  </tank>

  <tank type="FUEL" number="2">
     <location unit="IN">
       <x> 529.92 </x>
       <y>   0.00 </y>
       <z> -22.08 </z>
     </location>
     <capacity unit="LBS"> 6900.00 </capacity>
     <contents unit="LBS"> 3450.00 </contents>
  </tank>

 </propulsion>

 <flight_control name="FCS: F-111">
<property>/autopilot/internal/target-pitch-deg-ae</property>
<property>/f22/fcs/controls/elevator</property>
   <function name="fcs/ghold">
<sum>
<property>/orientation/pitch-deg</property>
<property>/autopilot/internal/target-pitch-deg-ae</property>
</sum>
   </function>

<!-- Wingsweep stuff -->
<!--32ft swept -->
<!--525sqft swept-->
<!--126lb/sqft  swept: 158lb/sqft-->


<property>/controls/baydoors/AIM120</property>

<property>/f22/fcs/glimit</property>
<property>/f22/fcs/aoalimit</property>
<function name="fcs/elevator-g-limit-pre">
    <table>
            <independentVar lookup="row">/accelerations/pilot-gdamped</independentVar>
            <independentVar lookup="column">/f22/fcs/glimit</independentVar>
            <tableData>
                    0     1     2     3     4     5     6     7     8     9     10     11     12
              1     1     0.5   0.7   0.8   0.9   1     1     1     1     1     1      1      1
              2     1     0.1   0.5   0.7   0.8   0.9   1     1     1     1     1      1      1
              3     1     0     0.1   0.5   0.7   0.8   0.9   1     1     1     1      1      1
              4     1     0     0     0.1   0.5   0.7   0.8   0.9   1     1     1      1      1
              5     1     0     0     0     0.1   0.5   0.7   0.8   0.9   1     1      1      1
              6     1     0     0     0     0     0.1   0.5   0.7   0.8   0.9   1      1      1
              7     1     0     0     0     0     0     0.1   0.5   0.7   0.8   0.9    1      1
              8     1     0     0     0     0     0     0     0.1   0.5   0.7   0.8    0.9    1
              9     1     0     0     0     0     0     0     0     0.1   0.5   0.7    0.8    0.9
             10     1     0     0     0     0     0     0     0     0     0.1   0.5    0.7    0.8
             11     1     0     0     0     0     0     0     0     0     0     0.1    0.5    0.7
             12     1     0     0     0     0     0     0     0     0     0     0      0.1    0.5
             13     1     0     0     0     0     0     0     0     0     0     0      0      0.1
             14     1     0     0     0     0     0     0     0     0     0     0      0      0
            </tableData>
          </table>
   </function>


<function name="fcs/aoa-pre">
        <table>
            <independentVar lookup="row">aero/alpha-deg</independentVar>
            <independentVar lookup="column">/f22/fcs/aoalimit</independentVar>
            <tableData>
                    10    20    30    40    50    60    70    80    90
              -20   1     1     1     1     1     1     1     1     1
              -10   1     1     1     1     1     1     1     1     1
              -1    1     1     1     1     1     1     1     1     1
               0    1     1     1     1     1     1     1     1     1
              10    0.1   1     1     1     1     1     1     1     1
              20    0     0.1   1     1     1     1     1     1     1
              30    0     0     0.1   1     1     1     1     1     1
              40    0     0     0     0.1   1     1     1     1     1
              50    0     0     0     0     0.1   1     1     1     1
              60    0     0     0     0     0     0.1   1     1     1
              70    0     0     0     0     0     0     0.1   1     1
              80    0     0     0     0     0     0     0     0.1   1
              89    0     0     0     0     0     0     0     0     1
              90    0     0     0     0     0     0     0     0     1
            </tableData>
          </table>
   </function>


   <function name="fcs/elevator-pos-limited">  <!--Main Elevator POS with Limit-->
<product>
      <property>fcs/elevator-cmd-norm</property>
      <property>fcs/aoa-pre</property>
      <property>fcs/elevator-g-limit-ae</property>
</product>
   </function>


<function name="fcs/aim120control">  <!-- TODO! Disable Flight control input when this function is zero! -Done! Add EPU support -Done! -->
 <description>eleca</description>
        <table>
            <independentVar lookup="row">/controls/baydoors/AIM120lock</independentVar>
            <!--<independentVar lookup="column">/controls/baydoors/AIM120</independentVar>-->
            <tableData>
              0     0.5
              1     1
            </tableData>
        </table>
   </function>


<function name="fcs/elevator-g-limit">
    <product>
      <property>fcs/elevator-cmd-norm</property> <!--if its Zero. Itll Cancel out the glimit, Making this function output 0-->
    <table>
            <independentVar lookup="row">/accelerations/pilot-gdamped</independentVar>
            <tableData>
              1     1
              9     1
              11.5     0
            </tableData>
          </table>
</product>
   </function>


    <function name="fcs/manual-wing-sweep-main">
       <description>manual wing sweep 1 Unswept 0 Swept</description>
          <table>
            <independentVar lookup="row">/controls/flight/manual-wing-sweep</independentVar>
            <tableData>
            0       -1
            1       0.0
            2       0.2
            3       0.4
            4       0.6
            5       0.8
            6       1.0
            </tableData>
          </table>
    </function>

  <channel name="wings">
   <kinematic name="manual-wing-sweep">
     <input>fcs/manual-wing-sweep-main</input>
     <traverse>
       <setting>
          <position>  -1 </position>
          <time>      0 </time>
       </setting>
       <setting>
          <position>  0 </position>
          <time>      0 </time>
       </setting>
       <setting>
          <position>  1 </position>
          <time>      8 </time>
       </setting>
     </traverse>
     <output>fcs/manual-wing-sweep</output>
   </kinematic>
  </channel>


    <function name="fcs/automatic-wing-sweep">
       <description>Automatic wing sweep 1 Unswept 0 Swept</description>
          <table>
            <independentVar lookup="row">velocities/mach</independentVar>
            <tableData>
            0.00     1
            0.70     1 <!--Start sweeping in at mach 0.70-->
            0.90     0
            </tableData>
          </table>
    </function>
    <function name="/surface-positions/wing-sweep-pos-norm">
       <description>wing sweep 1 Unswept 0 Swept</description>
          <table>
            <independentVar lookup="row">fcs/automatic-wing-sweep</independentVar>
            <independentVar lookup="column">fcs/manual-wing-sweep</independentVar>
            <tableData>
                    -1      0     1 <!-- -1 is auto-->
               0     0      0     0
               1     1      1     0
            </tableData>
          </table>
    </function>
    <function name="fcs/wing-lift">
       <description>coeff for extra lift due to wings swept out</description>
          <table>
            <independentVar lookup="row">velocities/mach</independentVar>
            <independentVar lookup="column">/surface-positions/wing-sweep-pos-norm</independentVar>
            <tableData>
                     0      1
               0     0      1
              0.4    0      1
              0.5    0      0 <!--cancel extra take off lift-->
            </tableData>
          </table>
    </function>


  <channel name="Pitch">
 <kinematic name="elevator g lim">
     <input>fcs/elevator-g-limit-pre</input>
     <traverse>
       <setting>
          <position>  -1 </position>
          <time>      0.7 </time>
       </setting>
       <setting>
          <position>  0 </position>
          <time>      0.7 </time>
       </setting>
       <setting>
          <position>  1 </position>
          <time>      0.7 </time>
       </setting>
     </traverse>
     <output>fcs/elevator-g-limit-ae</output>
   </kinematic>


   <kinematic name="Baydoors 2">
     <input>fcs/aim120control</input>
     <traverse>
       <setting>
          <position>  0.5 </position>
          <time>      0 </time>
       </setting>
       <setting>
          <position>  1 </position>
          <time>      0.6 </time>
       </setting>
     </traverse>
     <output>fcs/AIM120</output>
   </kinematic>

   <summer name="Pitch Trim Sum">
      <input>fcs/elevator-pos-limited</input>
      <input>fcs/pitch-trim-cmd-norm</input>
      <input>/f22/fcs/controls/elevator</input>
      <clipto>
        <min> -1 </min>
        <max>  1 </max>
      </clipto>
   </summer>

   <aerosurface_scale name="Elevator Control">
      <input>fcs/pitch-trim-sum</input>
      <range>
        <min> -0.35 </min>
        <max>  0.35 </max>
      </range>
      <output>fcs/elevator-pos-rad</output>
   </aerosurface_scale>

   <aerosurface_scale name="elevator normalization">
      <input>fcs/elevator-pos-rad</input>
      <domain>
        <min> -0.35 </min>
        <max>  0.35 </max>
      </domain>
      <range>
        <min> -1 </min>
        <max>  1 </max>
      </range>
      <output>fcs/elevator-pos-norm</output>
   </aerosurface_scale>

  </channel>

  <channel name="Roll">

   <summer name="Roll Trim Sum">
      <input>fcs/aileron-cmd-norm</input>
      <input>fcs/roll-trim-cmd-norm</input>
      <clipto>
        <min> -1 </min>
        <max>  1 </max>
      </clipto>
   </summer>

   <aerosurface_scale name="Left Aileron Control">
      <input>fcs/roll-trim-sum</input>
      <range>
        <min> -0.35 </min>
        <max>  0.35 </max>
      </range>
      <output>fcs/left-aileron-pos-rad</output>
   </aerosurface_scale>

   <aerosurface_scale name="Right Aileron Control">
      <input>fcs/roll-trim-sum</input>
      <range>
        <min> -0.35 </min>
        <max>  0.35 </max>
      </range>
      <output>fcs/right-aileron-pos-rad</output>
   </aerosurface_scale>

   <aerosurface_scale name="left aileron normalization">
      <input>fcs/left-aileron-pos-rad</input>
      <domain>
        <min> -0.35 </min>
        <max>  0.35 </max>
      </domain>
      <range>
        <min> -1 </min>
        <max>  1 </max>
      </range>
      <output>fcs/left-aileron-pos-norm</output>
   </aerosurface_scale>

   <aerosurface_scale name="right aileron normalization">
      <input>fcs/right-aileron-pos-rad</input>
      <domain>
        <min> -0.35 </min>
        <max>  0.35 </max>
      </domain>
      <range>
        <min> -1 </min>
        <max>  1 </max>
      </range>
      <output>fcs/right-aileron-pos-norm</output>
   </aerosurface_scale>

  </channel>

  <property value="1">fcs/yaw-damper-enable</property>
  <channel name="Yaw">

   <summer name="Rudder Command Sum">
      <input>fcs/rudder-cmd-norm</input>
      <input>fcs/yaw-trim-cmd-norm</input>
      <clipto>
        <min> -1 </min>
        <max>  1 </max>
      </clipto>
   </summer>

   <scheduled_gain name="Yaw Damper Rate">
      <input>velocities/r-aero-rad_sec</input>
      <table>
        <independentVar lookup="row">velocities/ve-kts</independentVar>
         <tableData>
            30     0.00
            60     2.00
         </tableData>
      </table>
      <gain>fcs/yaw-damper-enable</gain>
   </scheduled_gain>

   <summer name="Rudder Sum">
      <input>fcs/rudder-command-sum</input>
      <input>fcs/yaw-damper-rate</input>
      <clipto>
        <min> -1.1 </min>
        <max>  1.1 </max>
      </clipto>
   </summer>

   <aerosurface_scale name="Rudder Control">
      <input>fcs/rudder-sum</input>
      <domain>
        <min> -1.1 </min>
        <max>  1.1 </max>
      </domain>
      <range>
        <min> -0.35 </min>
        <max>  0.35 </max>
      </range>
      <output>fcs/rudder-pos-rad</output>
   </aerosurface_scale>

   <aerosurface_scale name="rudder normalization">
      <input>fcs/rudder-pos-rad</input>
      <domain>
        <min> -0.35 </min>
        <max>  0.35 </max>
      </domain>
      <range>
        <min> -1 </min>
        <max>  1 </max>
      </range>
      <output>fcs/rudder-pos-norm</output>
   </aerosurface_scale>

  </channel>

  <channel name="Flaps">
   <kinematic name="Flaps Control">
     <input>fcs/flap-cmd-norm</input>
     <traverse>
       <setting>
          <position>  0 </position>
          <time>      0 </time>
       </setting>
       <setting>
          <position> 15 </position>
          <time>      4 </time>
       </setting>
       <setting>
          <position> 30 </position>
          <time>      3 </time>
       </setting>
     </traverse>
     <output>fcs/flap-pos-deg</output>
   </kinematic>

   <aerosurface_scale name="flap normalization">
      <input>fcs/flap-pos-deg</input>
      <domain>
        <min>  0 </min>
        <max> 30 </max>
      </domain>
      <range>
        <min> 0 </min>
        <max> 1 </max>
      </range>
      <output>fcs/flap-pos-norm</output>
   </aerosurface_scale>

  </channel>

  <channel name="Landing Gear">
   <kinematic name="Gear Control">
     <input>gear/gear-cmd-norm</input>
     <traverse>
       <setting>
          <position> 0 </position>
          <time>     0 </time>
       </setting>
       <setting>
          <position> 1 </position>
          <time>     5 </time>
       </setting>
     </traverse>
     <output>gear/gear-pos-norm</output>
   </kinematic>

  </channel>

  <channel name="Speedbrake">
   <kinematic name="Speedbrake Control">
     <input>fcs/speedbrake-cmd-norm</input>
     <traverse>
       <setting>
          <position> 0 </position>
          <time>     0 </time>
       </setting>
       <setting>
          <position> 1 </position>
          <time>     1 </time>
       </setting>
     </traverse>
     <output>fcs/speedbrake-pos-norm</output>
   </kinematic>

  </channel>

 </flight_control>

 <aerodynamics>

  <axis name="LIFT">

    <function name="aero/force/Lift_alpha">
      <description>Lift due to alpha</description>
      <product>
          <property>aero/qbar-psf</property>
          <property>metrics/Sw-sqft</property>
          <table>
            <independentVar lookup="row">aero/alpha-rad</independentVar>
            <tableData>
              -0.20 -0.640
               0.00  0.080
               0.26  1.000
               0.90  0.448
            </tableData>
          </table>
      </product>
    </function>

    <function name="aero/force/Lift_flap">
       <description>Delta Lift due to flaps</description>
       <product>
           <property>aero/qbar-psf</property>
           <property>metrics/Sw-sqft</property>
           <property>fcs/flap-pos-deg</property>
           <value> 0.01167 </value>
       </product>
    </function>
    <function name="aero/force/Lift_takeoffwing">
       <description>Extra Delta Lift due to large wings</description>
       <product>
           <property>aero/qbar-psf</property>
           <property>metrics/Sw-sqft</property>
           <property>fcs/wing-lift</property>
           <value> 30 </value>
           <value> 0.01167 </value>
       </product>
    </function>


    <function name="aero/force/Lift_speedbrake">
       <description>Delta Lift due to speedbrake</description>
       <product>
           <property>aero/qbar-psf</property>
           <property>metrics/Sw-sqft</property>
           <property>fcs/speedbrake-pos-norm</property>
           <value>0</value>
       </product>
    </function>

    <function name="aero/force/Lift_elevator">
       <description>Lift due to Elevator Deflection</description>
       <product>
           <property>aero/qbar-psf</property>
           <property>metrics/Sw-sqft</property>
           <property>fcs/elevator-pos-rad</property>
           <value>0.3</value>
       </product>
    </function>

  </axis>

  <axis name="DRAG">

    <function name="aero/force/Drag_basic">
       <description>Drag at zero lift</description>
       <product>
          <property>aero/qbar-psf</property>
          <property>metrics/Sw-sqft</property>
          <table>
            <independentVar lookup="row">aero/alpha-rad</independentVar>
            <tableData>
             -1.57    1.500
             -0.26    0.000
              0.00    0.000
              0.26    0.000
              1.57    0.800
            </tableData>
          </table>
       </product>
    </function>

    <function name="aero/force/Drag_induced">
       <description>Induced drag</description>
         <product>
           <property>aero/qbar-psf</property>
           <property>metrics/Sw-sqft</property>
           <property>aero/cl-squared</property>
           <value>0.02</value>
         </product>
    </function>

    <function name="aero/force/Drag_mach">
       <description>Drag due to mach</description>
        <product>
          <property>aero/qbar-psf</property>
          <property>metrics/Sw-sqft</property>
          <table>
            <independentVar lookup="row">velocities/mach</independentVar>
            <tableData>
                0.00      0.000
                0.81      0.000
                1.10      0.003
                2.80      0.001
                3.40      0.000
                3.6       0.0001
                3.80      0.005
            </tableData>
          </table>
        </product>
    </function>

    <function name="aero/force/Drag_flap">
       <description>Drag due to flaps</description>
         <product>
           <property>aero/qbar-psf</property>
           <property>metrics/Sw-sqft</property>
           <property>fcs/flap-pos-deg</property>
           <value> 0.00250 </value>
         </product>
    </function>

    <function name="aero/force/Drag_gear">
       <description>Drag due to gear</description>
         <product>
           <property>aero/qbar-psf</property>
           <property>metrics/Sw-sqft</property>
           <property>gear/gear-pos-norm</property>
           <value>0.02</value>
         </product>
    </function>

    <function name="aero/force/Drag_speedbrake">
       <description>Drag due to speedbrakes</description>
         <product>
           <property>aero/qbar-psf</property>
           <property>metrics/Sw-sqft</property>
           <property>fcs/speedbrake-pos-norm</property>
           <value>0.144</value>
         </product>
    </function>

    <function name="aero/force/Drag_beta">
       <description>Drag due to sideslip</description>
       <product>
          <property>aero/qbar-psf</property>
          <property>metrics/Sw-sqft</property>
          <table>
            <independentVar lookup="row">aero/beta-rad</independentVar>
            <tableData>
              -1.57    1.230
              -0.26    0.050
               0.00    0.000
               0.26    0.050
               1.57    1.230
            </tableData>
          </table>
       </product>
    </function>

    <function name="aero/force/Drag_elevator">
       <description>Drag due to Elevator Deflection</description>
       <product>
           <property>aero/qbar-psf</property>
           <property>metrics/Sw-sqft</property>
           <abs><property>fcs/elevator-pos-norm</property></abs>
           <value>0.04</value>
       </product>
    </function>

  </axis>

  <axis name="SIDE">

    <function name="aero/force/Side_beta">
       <description>Side force due to beta</description>
       <product>
           <property>aero/qbar-psf</property>
           <property>metrics/Sw-sqft</property>
           <property>aero/beta-rad</property>
           <value>-1</value>
       </product>
    </function>

  </axis>

  <axis name="ROLL">

    <function name="aero/moment/Roll_beta">
       <description>Roll moment due to beta</description>
       <product>
           <property>aero/qbar-psf</property>
           <property>metrics/Sw-sqft</property>
           <property>metrics/bw-ft</property>
           <property>aero/beta-rad</property>
           <value>-0.1</value>
       </product>
    </function>

    <function name="aero/moment/Roll_damp">
       <description>Roll moment due to roll rate</description>
       <product>
           <property>aero/qbar-psf</property>
           <property>metrics/Sw-sqft</property>
           <property>metrics/bw-ft</property>
           <property>aero/bi2vel</property>
           <property>velocities/p-aero-rad_sec</property>
           <value>-0.4</value>
       </product>
    </function>

    <function name="aero/moment/Roll_yaw">
       <description>Roll moment due to yaw rate</description>
       <product>
           <property>aero/qbar-psf</property>
           <property>metrics/Sw-sqft</property>
           <property>metrics/bw-ft</property>
           <property>aero/bi2vel</property>
           <property>velocities/r-aero-rad_sec</property>
           <value>0.15</value>
       </product>
    </function>

    <function name="aero/moment/Roll_aileron">
       <description>Roll moment due to aileron</description>
       <product>
          <property>aero/qbar-psf</property>
          <property>metrics/Sw-sqft</property>
          <property>metrics/bw-ft</property>
          <property>fcs/left-aileron-pos-rad</property>
          <value>0.12</value>
       </product>
    </function>

    <function name="aero/moment/Roll_rudder">
       <description>Roll moment due to rudder</description>
       <product>
           <property>aero/qbar-psf</property>
           <property>metrics/Sw-sqft</property>
           <property>metrics/bw-ft</property>
           <property>fcs/rudder-pos-rad</property>
           <value>0.01</value>
       </product>
    </function>

  </axis>

  <axis name="PITCH">

    <function name="aero/moment/Pitch_alpha">
       <description>Pitch moment due to alpha</description>
       <product>
           <property>aero/qbar-psf</property>
           <property>metrics/Sw-sqft</property>
           <property>metrics/cbarw-ft</property>
           <property>aero/alpha-rad</property>
           <value>-0.3</value>
       </product>
    </function>

    <function name="aero/moment/Pitch_elevator">
       <description>Pitch moment due to elevator</description>
       <product>
          <property>aero/qbar-psf</property>
          <property>metrics/Sw-sqft</property>
          <property>metrics/cbarw-ft</property>
          <property>fcs/elevator-pos-rad</property>
          <table>
            <independentVar lookup="row">velocities/mach</independentVar>
            <tableData>
              0.0     -0.800
              2.0     -0.200
            </tableData>
          </table>
       </product>
    </function>

    <function name="aero/moment/Pitch_damp">
       <description>Pitch moment due to pitch rate</description>
       <product>
           <property>aero/qbar-psf</property>
           <property>metrics/Sw-sqft</property>
           <property>metrics/cbarw-ft</property>
           <property>aero/ci2vel</property>
           <property>velocities/q-aero-rad_sec</property>
           <value>-18</value>
       </product>
    </function>

    <function name="aero/moment/Pitch_alphadot">
       <description>Pitch moment due to alpha rate</description>
       <product>
           <property>aero/qbar-psf</property>
           <property>metrics/Sw-sqft</property>
           <property>metrics/cbarw-ft</property>
           <property>aero/ci2vel</property>
           <property>aero/alphadot-rad_sec</property>
           <value>-9</value>
       </product>
    </function>

  </axis>

  <axis name="YAW">

    <function name="aero/moment/Yaw_beta">
       <description>Yaw moment due to beta</description>
       <product>
           <property>aero/qbar-psf</property>
           <property>metrics/Sw-sqft</property>
           <property>metrics/bw-ft</property>
           <property>aero/beta-rad</property>
           <value>0.12</value>
       </product>
    </function>

    <function name="aero/moment/Yaw_damp">
       <description>Yaw moment due to yaw rate</description>
       <product>
           <property>aero/qbar-psf</property>
           <property>metrics/Sw-sqft</property>
           <property>metrics/bw-ft</property>
           <property>aero/bi2vel</property>
           <property>velocities/r-aero-rad_sec</property>
           <value>-0.15</value>
       </product>
    </function>

    <function name="aero/moment/Yaw_rudder">
       <description>Yaw moment due to rudder</description>
       <product>
           <property>aero/qbar-psf</property>
           <property>metrics/Sw-sqft</property>
           <property>metrics/bw-ft</property>
           <property>fcs/rudder-pos-rad</property>
           <value>-0.1</value>
       </product>
    </function>

    <function name="aero/moment/Yaw_aileron">
       <description>Adverse yaw</description>
       <product>
           <property>aero/qbar-psf</property>
           <property>metrics/Sw-sqft</property>
           <property>metrics/bw-ft</property>
           <property>fcs/left-aileron-pos-rad</property>
           <value>0</value>
       </product>
    </function>

  </axis>

 </aerodynamics>

 <external_reactions>
 </external_reactions>

</fdm_config>
